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/batch
! ANSYS input file written by Workbench version 15.0.7  Release
! File used for geometry attach: D:\MyDocs\Documents\Senior\Fall\Senior Design 1\AgileRoboticControls\SolidWorks Models\ANSYS\Models_files\dp0\SYS-1\DM\SYS-1.agdb
/title,Models--Static Structural (B5)
/com,--- Data in consistent MKS units.
/units,MKS
/prep7
! Turn off shape checking because checks already performed inside WB mesher.
! See help system for more information.
SHPP,OFF,,NOWARN
etcon,set             ! allow ANSYS to choose best KEYOP's for 180x elements
/com,*********** Nodes for the whole assembly ***********
nblock,3
(1i9,3e20.9e3)
        1    1.750000000E-002   -2.627831216E-001   -2.500000000E-003
        2    1.500000000E-002   -2.584529946E-001   -2.500000000E-003
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-1
/com,*********** Elements for Body 1 "Solid" ***********
et,1,187
eblock,19,solid,,4135
(19i9)
        1        1        1        1        0        0        0        0       10        0        1      721     1253      766     1204     5817     6092     5812     5816
     7769     6091
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-1
/com,*********** Send User Defined Coordinate System(s) ***********
csys,0
toffst,273.15,  ! Temperature offset from absolute zero
/com,*********** Set Reference Temperature ***********
tref,22.
/com,*********** Send Materials ***********
MP,DENS,1,2770,	! kg m^-3
MP,ALPX,1,2.3e-05,	! C^-1
MP,C,1,875,	! J kg^-1 C^-1
MPTEMP,,,,,,,,
MPTEMP,1,-100
MPTEMP,2,0
MPTEMP,3,100
MPTEMP,4,200
MPDATA,KXX,1, ,114,144,165,175,	! W m^-1 C^-1
MPTEMP,,,,,,,,
MPTEMP,,,,,,,,
MPTEMP,1,0
MPTEMP,2,20
MPTEMP,3,100
MPDATA,RSVX,1, ,2.43e-08,2.67e-08,3.63e-08,	! kg m^3 A^-2 s^-3
MPTEMP,,,,,,,,
MP,EX,1,71000000000,	! Pa
MP,NUXY,1,0.33,
MP,MURX,1,1,

!************************* Model Summary ********************
!Solid,	Aluminum Alloy,	matid,	1
!************************* End Model Summary ********************
/com,******* Constant Zero Displacement X *******
CMBLOCK,_DISPZEROUX,NODE,      164
(8i10)
        65        66        67        68        69        70        71        72
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cmsel,s,_DISPZEROUX
d,all,ux,0
nsel,all
/com,******* Constant Zero Displacement Y *******
CMBLOCK,_DISPZEROUY,NODE,      164
(8i10)
        65        66        67        68        69        70        71        72
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cmsel,s,_DISPZEROUY
d,all,uy,0
nsel,all
/com,******* Constant Zero Displacement Z *******
CMBLOCK,_DISPZEROUZ,NODE,      164
(8i10)
        65        66        67        68        69        70        71        72
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cmsel,s,_DISPZEROUZ
d,all,uz,0
nsel,all
nsel,all
/com,*********** Create Remote Point "Internal Remote Point" ***********
! -------- Remote Point Used by "Remote Force" --------
*set,tid,3
*set,cid,2
et,cid,174
et,tid,170
keyo,tid,2,1               ! Don't fix the pilot node
keyo,tid,4,111111
keyo,cid,12,5              ! Bonded Contact
keyo,cid,4,1               ! Deformable RBE3 style load
keyo,cid,2,2               ! MPC style contact
eblock,10,,,16
(15i9)
     4140        2        2        2        0      808      812      816      816     6279     6299      816     6281
     4141        2        2        2        0      804      811      812      812     6255     6294      812     6256
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-1
eblock,10,,,16
(15i9)
     4156        2        2        2        0       69       73       77       77     1731     1748       77     1733
     4157        2        2        2        0       65       72       73       73     1710     1744       73     1711
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-1
*set,_npilot,8034
_npilot30=_npilot
type,tid
mat ,cid
real,cid
tshape,pilo
en,4172,_npilot
tshape
/com,*********** Create Remote Point "Internal Remote Point 2" ***********
! -------- Remote Point Used by "Remote Force 2" --------
*set,tid,5
*set,cid,4
et,cid,174
et,tid,170
keyo,tid,2,1               ! Don't fix the pilot node
keyo,tid,4,111111
keyo,cid,12,5              ! Bonded Contact
keyo,cid,4,1               ! Deformable RBE3 style load
keyo,cid,2,2               ! MPC style contact
eblock,10,,,16
(15i9)
     4173        4        4        4        0       31       27       39       39     1518     1521       39     1545
     4174        4        4        4        0       29       32       40       40     1532     1549       40     1535
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-1
eblock,10,,,16
(15i9)
     4189        4        4        4        0      846      842      854      854     6445     6448      854     6472
     4190        4        4        4        0      844      847      855      855     6459     6479      855     6462
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-1
*set,_npilot,8035
_npilot33=_npilot
type,tid
mat ,cid
real,cid
tshape,pilo
en,4205,_npilot
tshape
/com,*********** Create Remote Point "Internal Remote Point 3" ***********
! -------- Remote Point Used by "Remote Force 3" --------
*set,tid,7
*set,cid,6
et,cid,174
et,tid,170
keyo,tid,2,1               ! Don't fix the pilot node
keyo,tid,4,111111
keyo,cid,12,5              ! Bonded Contact
keyo,cid,4,1               ! Deformable RBE3 style load
keyo,cid,2,2               ! MPC style contact
eblock,10,,,16
(15i9)
     4206        6        6        6        0      777      781      785      785     6140     6159      785     6142
     4207        6        6        6        0      781      786      789      789     6160     6181      789     6161
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-1
*set,_npilot,8036
_npilot36=_npilot
type,tid
mat ,cid
real,cid
tshape,pilo
en,4222,_npilot
tshape
/com,*********** Create Remote Point "Internal Remote Point 4" ***********
! -------- Remote Point Used by "Remote Force 4" --------
*set,tid,9
*set,cid,8
et,cid,174
et,tid,170
keyo,tid,2,1               ! Don't fix the pilot node
keyo,tid,4,111111
keyo,cid,12,5              ! Bonded Contact
keyo,cid,4,1               ! Deformable RBE3 style load
keyo,cid,2,2               ! MPC style contact
eblock,10,,,26
(15i9)
     4223        8        8        8        0      649      992      989      989     5359     7029      989     5358
     4224        8        8        8        0      661      657      993      993     5408     5413      993     5436
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-1
*set,_npilot,8037
_npilot39=_npilot
type,tid
mat ,cid
real,cid
tshape,pilo
en,4249,_npilot
tshape
/com,*********** Construct Remote Force Using RBE3/CERIG Contact ***********

*DIM,_loadvari29x,TABLE,2,1,1,TIME,
! Time values
_loadvari29x(1,0,1) = 0.
_loadvari29x(2,0,1) = 1.
! Load values
_loadvari29x(1,1,1) = 0.
_loadvari29x(2,1,1) = 73.59


*DIM,_loadvari29y,TABLE,2,1,1,TIME,
! Time values
_loadvari29y(1,0,1) = 0.
_loadvari29y(2,0,1) = 1.
! Load values
_loadvari29y(1,1,1) = 0.
_loadvari29y(2,1,1) = -25.45


*DIM,_loadvari29z,TABLE,2,1,1,TIME,
! Time values
_loadvari29z(1,0,1) = 0.
_loadvari29z(2,0,1) = 1.
! Load values
_loadvari29z(1,1,1) = 0.
_loadvari29z(2,1,1) = 0.

/com,*********** Construct Remote Force Using RBE3/CERIG Contact ***********

*DIM,_loadvari32x,TABLE,2,1,1,TIME,
! Time values
_loadvari32x(1,0,1) = 0.
_loadvari32x(2,0,1) = 1.
! Load values
_loadvari32x(1,1,1) = 0.
_loadvari32x(2,1,1) = -2.02e-002


*DIM,_loadvari32y,TABLE,2,1,1,TIME,
! Time values
_loadvari32y(1,0,1) = 0.
_loadvari32y(2,0,1) = 1.
! Load values
_loadvari32y(1,1,1) = 0.
_loadvari32y(2,1,1) = 0.2619


*DIM,_loadvari32z,TABLE,2,1,1,TIME,
! Time values
_loadvari32z(1,0,1) = 0.
_loadvari32z(2,0,1) = 1.
! Load values
_loadvari32z(1,1,1) = 0.
_loadvari32z(2,1,1) = 0.

/com,*********** Construct Remote Force Using RBE3/CERIG Contact ***********

*DIM,_loadvari35x,TABLE,2,1,1,TIME,
! Time values
_loadvari35x(1,0,1) = 0.
_loadvari35x(2,0,1) = 1.
! Load values
_loadvari35x(1,1,1) = 0.
_loadvari35x(2,1,1) = 626.6


*DIM,_loadvari35y,TABLE,2,1,1,TIME,
! Time values
_loadvari35y(1,0,1) = 0.
_loadvari35y(2,0,1) = 1.
! Load values
_loadvari35y(1,1,1) = 0.
_loadvari35y(2,1,1) = 806.8


*DIM,_loadvari35z,TABLE,2,1,1,TIME,
! Time values
_loadvari35z(1,0,1) = 0.
_loadvari35z(2,0,1) = 1.
! Load values
_loadvari35z(1,1,1) = 0.
_loadvari35z(2,1,1) = 0.

/com,*********** Construct Remote Force Using RBE3/CERIG Contact ***********

*DIM,_loadvari38x,TABLE,2,1,1,TIME,
! Time values
_loadvari38x(1,0,1) = 0.
_loadvari38x(2,0,1) = 1.
! Load values
_loadvari38x(1,1,1) = 0.
_loadvari38x(2,1,1) = -783.


*DIM,_loadvari38y,TABLE,2,1,1,TIME,
! Time values
_loadvari38y(1,0,1) = 0.
_loadvari38y(2,0,1) = 1.
! Load values
_loadvari38y(1,1,1) = 0.
_loadvari38y(2,1,1) = -1141.9


*DIM,_loadvari38z,TABLE,2,1,1,TIME,
! Time values
_loadvari38z(1,0,1) = 0.
_loadvari38z(2,0,1) = 1.
! Load values
_loadvari38z(1,1,1) = 0.
_loadvari38z(2,1,1) = 0.

fini
/com,****************************************************************************
/com,*************************    SOLUTION       ********************************
/com,****************************************************************************
/solu
antype,0                   ! static analysis
solc,on,on                 ! Turn on solution control with ability to use contact time prediction
eqsl,pcg,1e-8,,,,,,1
cntr,print,1               ! print out contact info and also make no initial contact an error
nldiag,cont,iter           ! print out contact info each equilibrium iteration
resc,,none                 ! Do not keep any restart files
/com,****************************************************
/com,******************* SOLVE FOR LS 1 ****************
nsel,s,node,,8034
f,all,fx,%_loadvari29x%
f,all,fy,%_loadvari29y%
f,all,fz,%_loadvari29z%
nsel,s,node,,8035
f,all,fx,%_loadvari32x%
f,all,fy,%_loadvari32y%
f,all,fz,%_loadvari32z%
nsel,s,node,,8036
f,all,fx,%_loadvari35x%
f,all,fy,%_loadvari35y%
f,all,fz,%_loadvari35z%
nsel,s,node,,8037
f,all,fx,%_loadvari38x%
f,all,fy,%_loadvari38y%
f,all,fz,%_loadvari38z%
nsel,all
nsub,1,1,1
time,1.
outres,erase
outres,all,none
outres,nsol,all
outres,rsol,all
outres,strs,all
outres,epel,all
outres,eppl,all
stabilize,off                   ! Stabilization turned OFF by user
! *********** WB SOLVE COMMAND ***********
! check interactive state
*get,ANSINTER_,active,,int
*if,ANSINTER_,ne,0,then
/eof
*endif
solve
/com *************** Write FE CONNECTORS *********
CEWRITE,file,ce,,INTE
/com,****************************************************
/com,*************** FINISHED SOLVE FOR LS 1 *************
*set,_DS_PROGRESS          ! turn off progress updates to avoid virus scanning bug
*get,_PCGITER,active,,solu,cgiter
/post1
fini
