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/batch
! ANSYS input file written by Workbench version 15.0.7  Release
! File used for geometry attach: D:\MyDocs\Documents\GitHub\AgileRoboticControls\System Modelling\Mechanical\Finite Elements\Thigh.IGS
/title,Design Workbench--Static Structural (G5)
/com,--- Data in consistent NMM units.
/units,MPA
/prep7
! Turn off shape checking because checks already performed inside WB mesher.
! See help system for more information.
SHPP,OFF,,NOWARN
etcon,set             ! allow ANSYS to choose best KEYOP's for 180x elements
/com,*********** Nodes for the whole assembly ***********
nblock,3
(1i9,3e20.9e3)
        1   -7.093053964E+001   -2.067161337E+002    0.000000000E+000
        2   -6.985842137E+001   -2.096672653E+002    0.000000000E+000
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-1
/com,*********** Elements for Body 1 "Part 1" ***********
et,1,183
keyo,1,3,3
eblock,19,solid,,470
(19i9)
        1        1        1        1        0        0        0        0        8        0        1      364      363      292      292     1429      815      292      814
        1        1        1        1        0        0        0        0        8        0        2      277      241      240      240     1249     1246      240     1247
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-1
/com,*********** Send User Defined Coordinate System(s) ***********
csys,0
toffst,273.15,  ! Temperature offset from absolute zero
/com,*********** Set Reference Temperature ***********
tref,22.
/com,*********** Send Materials ***********
MP,DENS,1,7.85e-09,	! tonne mm^-3
MP,ALPX,1,1.2e-05,	! C^-1
MP,C,1,434000000,	! mm^2 s^-2 C^-1
MP,KXX,1,60.5,	! tonne mm s^-3 C^-1
MP,RSVX,1,0.00017,	! ohm mm
MP,EX,1,200000,	! tonne s^-2 mm^-1
MP,NUXY,1,0.3,
MP,MURX,1,10000,

/com,*********** Send Sheet Properties ***********
r,1,12.7
!************************* Model Summary ********************
!Part 1,	Structural Steel,	matid,	1
!************************* End Model Summary ********************
/com,*********** Fixed Supports ***********
CMBLOCK,_FIXEDSU,NODE,       56
(8i10)
       558       559       560       561       562       563       564       565
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
cmsel,s,_FIXEDSU
d,all,all
nsel,all
nsel,all
/com,*********** Define Force Using Surface Effect Elements ***********
local,12,0,0.,0.,0.,-0.,0.,0.
csys,0
et,2,153
keyop,2,3,10   !get plane stress option and thickness from underlying element
eblock,10,,,7
(15i9)
      471        2        2        2       12      537      538     1594
      472        2        2        2       12      538      539     1595
      473        2        2        2       12      539      540     1596
      474        2        2        2       12      536      537     1593
      475        2        2        2       12      540      541     1597
      476        2        2        2       12      541      543     1601
      477        2        2        2       12      542      536     1599
-1
eblock,10,,,7
(15i9)
      478        2        2        2       12      530      531     1588
      479        2        2        2       12      543      530     1600
      480        2        2        2       12      532      533     1590
      481        2        2        2       12      533      534     1591
      482        2        2        2       12      534      535     1592
      483        2        2        2       12      535      542     1598
      484        2        2        2       12      531      532     1589
-1
esel,s,type,,2
keyop,2,2,1                ! Apply load in local coordinate system
keyop,2,7,1                ! Use original area so load is constant in large deformation
keyop,2,11,2               ! Use real and not project area
esel,all

*DIM,_loadvari28x,TABLE,2,1,1,TIME,
! Time values
_loadvari28x(1,0,1) = 0.
_loadvari28x(2,0,1) = 1.
! Load values
_loadvari28x(1,1,1) = 0.
_loadvari28x(2,1,1) = 0.


*DIM,_loadvari28y,TABLE,2,1,1,TIME,
! Time values
_loadvari28y(1,0,1) = 0.
_loadvari28y(2,0,1) = 1.
! Load values
_loadvari28y(1,1,1) = 0.
_loadvari28y(2,1,1) = -4.20170936200146

/com,*********** Define Force Using Surface Effect Elements ***********
local,13,0,0.,0.,0.,-0.,0.,0.
csys,0
et,3,153
keyop,3,3,10   !get plane stress option and thickness from underlying element
eblock,10,,,7
(15i9)
      485        3        3        3       13      551      552     1608
      486        3        3        3       13      552      553     1609
      487        3        3        3       13      553      554     1610
      488        3        3        3       13      554      555     1611
      489        3        3        3       13      550      551     1607
      490        3        3        3       13      555      557     1615
      491        3        3        3       13      556      550     1613
-1
eblock,10,,,7
(15i9)
      492        3        3        3       13      546      547     1604
      493        3        3        3       13      547      548     1605
      494        3        3        3       13      545      546     1603
      495        3        3        3       13      544      545     1602
      496        3        3        3       13      557      544     1614
      497        3        3        3       13      548      549     1606
      498        3        3        3       13      549      556     1612
-1
esel,s,type,,3
keyop,3,2,1                ! Apply load in local coordinate system
keyop,3,7,1                ! Use original area so load is constant in large deformation
keyop,3,11,2               ! Use real and not project area
esel,all

*DIM,_loadvari30x,TABLE,2,1,1,TIME,
! Time values
_loadvari30x(1,0,1) = 0.
_loadvari30x(2,0,1) = 1.
! Load values
_loadvari30x(1,1,1) = 0.
_loadvari30x(2,1,1) = 0.


*DIM,_loadvari30y,TABLE,2,1,1,TIME,
! Time values
_loadvari30y(1,0,1) = 0.
_loadvari30y(2,0,1) = 1.
! Load values
_loadvari30y(1,1,1) = 0.
_loadvari30y(2,1,1) = 1.51964110484941e-002

/com,*********** Define Force Using Surface Effect Elements ***********
local,14,0,0.,0.,0.,-0.,0.,0.
csys,0
et,4,153
keyop,4,3,10   !get plane stress option and thickness from underlying element
eblock,10,,,7
(15i9)
      499        4        4        4       14      569      571     1629
      500        4        4        4       14      566      567     1623
      501        4        4        4       14      567      568     1624
      502        4        4        4       14      565      566     1622
      503        4        4        4       14      568      569     1625
      504        4        4        4       14      564      565     1621
      505        4        4        4       14      570      564     1627
-1
eblock,10,,,7
(15i9)
      506        4        4        4       14      571      558     1628
      507        4        4        4       14      559      560     1617
      508        4        4        4       14      560      561     1618
      509        4        4        4       14      561      562     1619
      510        4        4        4       14      558      559     1616
      511        4        4        4       14      562      563     1620
      512        4        4        4       14      563      570     1626
-1
esel,s,type,,4
keyop,4,2,1                ! Apply load in local coordinate system
keyop,4,7,1                ! Use original area so load is constant in large deformation
keyop,4,11,2               ! Use real and not project area
esel,all

*DIM,_loadvari32x,TABLE,2,1,1,TIME,
! Time values
_loadvari32x(1,0,1) = 0.
_loadvari32x(2,0,1) = 1.
! Load values
_loadvari32x(1,1,1) = 0.
_loadvari32x(2,1,1) = -1.23742193525384


*DIM,_loadvari32y,TABLE,2,1,1,TIME,
! Time values
_loadvari32y(1,0,1) = 0.
_loadvari32y(2,0,1) = 1.
! Load values
_loadvari32y(1,1,1) = 0.
_loadvari32y(2,1,1) = 1.59266268221666

/com,*********** Define Force Using Surface Effect Elements ***********
local,15,0,0.,0.,0.,-0.,0.,0.
csys,0
et,5,153
keyop,5,3,10   !get plane stress option and thickness from underlying element
eblock,10,,,7
(15i9)
      513        5        5        5       15      580      581     1637
      514        5        5        5       15      581      582     1638
      515        5        5        5       15      582      583     1639
      516        5        5        5       15      579      580     1636
      517        5        5        5       15      578      579     1635
      518        5        5        5       15      583      585     1643
      519        5        5        5       15      584      578     1641
-1
eblock,10,,,7
(15i9)
      520        5        5        5       15      574      575     1632
      521        5        5        5       15      573      574     1631
      522        5        5        5       15      575      576     1633
      523        5        5        5       15      572      573     1630
      524        5        5        5       15      585      572     1642
      525        5        5        5       15      576      577     1634
      526        5        5        5       15      577      584     1640
-1
esel,s,type,,5
keyop,5,2,1                ! Apply load in local coordinate system
keyop,5,7,1                ! Use original area so load is constant in large deformation
keyop,5,11,2               ! Use real and not project area
esel,all

*DIM,_loadvari34x,TABLE,2,1,1,TIME,
! Time values
_loadvari34x(1,0,1) = 0.
_loadvari34x(2,0,1) = 1.
! Load values
_loadvari34x(1,1,1) = 0.
_loadvari34x(2,1,1) = 1.54529726722977


*DIM,_loadvari34y,TABLE,2,1,1,TIME,
! Time values
_loadvari34y(1,0,1) = 0.
_loadvari34y(2,0,1) = 1.
! Load values
_loadvari34y(1,1,1) = 0.
_loadvari34y(2,1,1) = -2.25380520967611

fini
/com,****************************************************************************
/com,*************************    SOLUTION       ********************************
/com,****************************************************************************
/solu
antype,0                   ! static analysis
solc,on,on                 ! Turn on solution control with ability to use contact time prediction
eqsl,sparse,,,,,1
cntr,print,1               ! print out contact info and also make no initial contact an error
nldiag,cont,iter           ! print out contact info each equilibrium iteration
resc,,none                 ! Do not keep any restart files
/com,****************************************************
/com,******************* SOLVE FOR LS 1 ****************
esel,s,type,,2
nsle
sfe,all,1,pres,1,%_loadvari28x%
sfe,all,2,pres,1,%_loadvari28y%
esel,s,type,,3
nsle
sfe,all,1,pres,1,%_loadvari30x%
sfe,all,2,pres,1,%_loadvari30y%
esel,s,type,,4
nsle
sfe,all,1,pres,1,%_loadvari32x%
sfe,all,2,pres,1,%_loadvari32y%
esel,s,type,,5
nsle
sfe,all,1,pres,1,%_loadvari34x%
sfe,all,2,pres,1,%_loadvari34y%
nsel,all
esel,all
nsub,1,1,1
time,1.
outres,erase
outres,all,none
outres,nsol,all
outres,rsol,all
outres,strs,all
outres,epel,all
outres,eppl,all
stabilize,off                   ! Stabilization turned OFF by user
! *********** WB SOLVE COMMAND ***********
! check interactive state
*get,ANSINTER_,active,,int
*if,ANSINTER_,ne,0,then
/eof
*endif
solve
/com *************** Write FE CONNECTORS *********
CEWRITE,file,ce,,INTE
/com,****************************************************
/com,*************** FINISHED SOLVE FOR LS 1 *************
*set,_DS_PROGRESS          ! turn off progress updates to avoid virus scanning bug
/post1
fini
