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/batch
! ANSYS input file written by Workbench version 15.0.7  Release
! File used for geometry attach: D:\MyDocs\Documents\GitHub\AgileRoboticControls\System Modelling\Mechanical\Finite Elements\Pin Joint.IGS
/title,Design Workbench--Static Structural (I5)
/com,--- Data in consistent NMM units.
/units,MPA
/prep7
! Turn off shape checking because checks already performed inside WB mesher.
! See help system for more information.
SHPP,OFF,,NOWARN
etcon,set             ! allow ANSYS to choose best KEYOP's for 180x elements
/com,*********** Nodes for the whole assembly ***********
nblock,3
(1i9,3e20.9e3)
        1   -3.711634116E+001    3.847553526E+001    1.763888889E+000
        2   -3.711634116E+001    3.847553526E+001    3.527777778E+000
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-1
/com,*********** Elements for Body 1 "Part 1" ***********
et,1,186
keyo,1,2,1          ! set full integration on SOLID186
eblock,19,solid,,738
(19i9)
        1        1        1        1        0        0        0        0       20        0        1       35      307      375      273      556      540      536      542
     1150     2285     2147     1148     2817     2801     2802     2821     1151     2287     2442     2149
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-1
/com,*********** Send User Defined Coordinate System(s) ***********
csys,0
toffst,273.15,  ! Temperature offset from absolute zero
/com,*********** Set Reference Temperature ***********
tref,22.
/com,*********** Send Materials ***********
MP,DENS,1,7.85e-09,	! tonne mm^-3
MP,ALPX,1,1.2e-05,	! C^-1
MP,C,1,434000000,	! mm^2 s^-2 C^-1
MP,KXX,1,60.5,	! tonne mm s^-3 C^-1
MP,RSVX,1,0.00017,	! ohm mm
MP,EX,1,200000,	! tonne s^-2 mm^-1
MP,NUXY,1,0.3,
MP,MURX,1,10000,

!************************* Model Summary ********************
!Part 1,	Structural Steel,	matid,	1
!************************* End Model Summary ********************
nsel,all
/com,*********** Define Force Using Surface Effect Elements ***********
local,12,0,0.,0.,0.,-0.,0.,0.
csys,0
et,2,156
keyop,2,5,1   ! No orientation node
eblock,10,,,11
(15i9)
      739        2        2        2       12      590      611     2916
      740        2        2        2       12      591      590     2915
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-1
eblock,10,,,11
(15i9)
      750        2        2        2       12      601      600     2936
      751        2        2        2       12      602      601     2938
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-1
esel,s,type,,2
keyop,2,2,1                ! Apply load in local coordinate system
keyop,2,7,1                ! Use original area so load is constant in large deformation
esel,all

*DIM,_loadvari25x,TABLE,2,1,1,TIME,
! Time values
_loadvari25x(1,0,1) = 0.
_loadvari25x(2,0,1) = 1.
! Load values
_loadvari25x(1,1,1) = 0.
_loadvari25x(2,1,1) = 2.30587663254134


*DIM,_loadvari25y,TABLE,2,1,1,TIME,
! Time values
_loadvari25y(1,0,1) = 0.
_loadvari25y(2,0,1) = 1.
! Load values
_loadvari25y(1,1,1) = 0.
_loadvari25y(2,1,1) = 4.98771141169267


*DIM,_loadvari25z,TABLE,2,1,1,TIME,
! Time values
_loadvari25z(1,0,1) = 0.
_loadvari25z(2,0,1) = 1.
! Load values
_loadvari25z(1,1,1) = 0.
_loadvari25z(2,1,1) = 0.

/com,*********** Define Force Using Surface Effect Elements ***********
local,13,0,0.,0.,0.,-0.,0.,0.
csys,0
et,3,156
keyop,3,5,1   ! No orientation node
eblock,10,,,11
(15i9)
      761        3        3        3       13      792      998     3328
      762        3        3        3       13      998      999     3720
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-1
eblock,10,,,11
(15i9)
      772        3        3        3       13      827      782     3317
      773        3        3        3       13      782      783     3316
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-1
esel,s,type,,3
keyop,3,2,1                ! Apply load in local coordinate system
keyop,3,7,1                ! Use original area so load is constant in large deformation
esel,all

*DIM,_loadvari27x,TABLE,2,1,1,TIME,
! Time values
_loadvari27x(1,0,1) = 0.
_loadvari27x(2,0,1) = 1.
! Load values
_loadvari27x(1,1,1) = 0.
_loadvari27x(2,1,1) = -2.28081275676479


*DIM,_loadvari27y,TABLE,2,1,1,TIME,
! Time values
_loadvari27y(1,0,1) = 0.
_loadvari27y(2,0,1) = 1.
! Load values
_loadvari27y(1,1,1) = 0.
_loadvari27y(2,1,1) = -4.98771141314498


*DIM,_loadvari27z,TABLE,2,1,1,TIME,
! Time values
_loadvari27z(1,0,1) = 0.
_loadvari27z(2,0,1) = 1.
! Load values
_loadvari27z(1,1,1) = 0.
_loadvari27z(2,1,1) = 0.

et,4,14             ! spring element type
/com,*********** Construct Weak Springs, Prototype 1 ***********
*set,_delta,1.82389867902958
type,4
mat,5
real,5
r,5,3.51956930979235e-004
nsel,all
*get,_nspr,ndmx
_nspr=_nspr+1
esel,s,mat,,1
nsle,s,active
*get,_minx,node,0,mnloc,x
*get,_miny,node,0,mnloc,y
*get,_minz,node,0,mnloc,z
*get,_maxx,node,0,mxloc,x
*get,_maxy,node,0,mxloc,y
*get,_maxz,node,0,mxloc,z
*dim,_ntets,arra,8
_ntets(1) = NODE(_minx,_miny,_minz)
_ntets(2) = NODE(_minx,_miny,_maxz)
_ntets(3) = NODE(_minx,_maxy,_minz)
_ntets(4) = NODE(_minx,_maxy,_maxz)
_ntets(5) = NODE(_maxx,_miny,_minz)
_ntets(6) = NODE(_maxx,_miny,_maxz)
_ntets(7) = NODE(_maxx,_maxy,_minz)
_ntets(8) = NODE(_maxx,_maxy,_maxz)
*do,_i,1,8
  n,_nspr,nx(_ntets(_i))+_delta,ny(_ntets(_i)),nz(_ntets(_i))
  e,_ntets(_i),_nspr
  d,_nspr,all
  _nspr=_nspr+1
  n,_nspr,nx(_ntets(_i)),ny(_ntets(_i))+_delta,nz(_ntets(_i))
  e,_ntets(_i),_nspr
  d,_nspr,all
  _nspr=_nspr+1
  n,_nspr,nx(_ntets(_i)),ny(_ntets(_i)),nz(_ntets(_i))+_delta
  e,_ntets(_i),_nspr
  d,_nspr,all
  _nspr=_nspr+1
*enddo
*set,_ntets
nsel,all
esel,all
fini
/com,****************************************************************************
/com,*************************    SOLUTION       ********************************
/com,****************************************************************************
/solu
antype,0                   ! static analysis
solc,on,on                 ! Turn on solution control with ability to use contact time prediction
eqsl,pcg,1e-8,,,,,,1
cntr,print,1               ! print out contact info and also make no initial contact an error
nldiag,cont,iter           ! print out contact info each equilibrium iteration
resc,,none                 ! Do not keep any restart files
/com,****************************************************
/com,******************* SOLVE FOR LS 1 ****************
esel,s,type,,2
nsle
sfe,all,1,pres,1,%_loadvari25x%
sfe,all,2,pres,1,%_loadvari25y%
sfe,all,3,pres,1,%_loadvari25z%
esel,s,type,,3
nsle
sfe,all,1,pres,1,%_loadvari27x%
sfe,all,2,pres,1,%_loadvari27y%
sfe,all,3,pres,1,%_loadvari27z%
nsel,all
esel,all
nsub,1,1,1
time,1.
outres,erase
outres,all,none
outres,nsol,all
outres,rsol,all
outres,strs,all
outres,epel,all
outres,eppl,all
stabilize,off                   ! Stabilization turned OFF by user
! *********** WB SOLVE COMMAND ***********
! check interactive state
*get,ANSINTER_,active,,int
*if,ANSINTER_,ne,0,then
/eof
*endif
solve
/com *************** Write FE CONNECTORS *********
CEWRITE,file,ce,,INTE
/com,****************************************************
/com,*************** FINISHED SOLVE FOR LS 1 *************
*set,_DS_PROGRESS          ! turn off progress updates to avoid virus scanning bug
*get,_PCGITER,active,,solu,cgiter
/post1
fini
