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/batch
! ANSYS input file written by Workbench version 15.0.7  Release
! File used for geometry attach: D:\MyDocs\Documents\GitHub\AgileRoboticControls\System Modelling\Mechanical\Finite Elements\Shank.IGS
/title,Design Workbench--Static Structural (C5)
/com,--- Data in consistent MKS units.
/units,MKS
/prep7
! Turn off shape checking because checks already performed inside WB mesher.
! See help system for more information.
SHPP,OFF,,NOWARN
etcon,set             ! allow ANSYS to choose best KEYOP's for 180x elements
/com,*********** Nodes for the whole assembly ***********
nblock,3
(1i9,3e20.9e3)
        1   -4.882660318E-002   -8.730652519E-002    0.000000000E+000
        2   -3.971074289E-002   -1.187273711E-001    0.000000000E+000
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-1
/com,*********** Elements for Body 1 "Part 1" ***********
et,1,183
keyo,1,3,3
eblock,19,solid,,467
(19i9)
        1        1        1        1        0        0        0        0        8        0        1      385      230      384      384      734      735      384     1446
        1        1        1        1        0        0        0        0        8        0        2      414      233      413      413      710      711      413     1470
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-1
/com,*********** Send User Defined Coordinate System(s) ***********
csys,0
toffst,273.15,  ! Temperature offset from absolute zero
/com,*********** Set Reference Temperature ***********
tref,22.
/com,*********** Send Materials ***********
MP,DENS,1,2770,	! kg m^-3
MP,ALPX,1,2.3e-05,	! C^-1
MP,C,1,875,	! J kg^-1 C^-1
MPTEMP,,,,,,,,
MPTEMP,1,-100
MPTEMP,2,0
MPTEMP,3,100
MPTEMP,4,200
MPDATA,KXX,1, ,114,144,165,175,	! W m^-1 C^-1
MPTEMP,,,,,,,,
MPTEMP,,,,,,,,
MPTEMP,1,0
MPTEMP,2,20
MPTEMP,3,100
MPDATA,RSVX,1, ,2.43e-08,2.67e-08,3.63e-08,	! kg m^3 A^-2 s^-3
MPTEMP,,,,,,,,
MP,EX,1,71000000000,	! Pa
MP,NUXY,1,0.33,
MP,MURX,1,1,

/com,*********** Send Sheet Properties ***********
r,1,1.27e-002
!************************* Model Summary ********************
!Part 1,	Aluminum Alloy,	matid,	1
!************************* End Model Summary ********************
/com,*********** Fixed Supports ***********
CMBLOCK,_FIXEDSU,NODE,       25
(8i10)
       356       358       407       408       409       410       411       412
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cmsel,s,_FIXEDSU
d,all,all
nsel,all
/com,********* Frictionless Supports X *********
CMBLOCK,_FRICSUX,NODE,       30
(8i10)
       359       363       364       368       369       370       371       372
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cmsel,s,_FRICSUX
d,all,ux,0
nsel,all
/com,********* Frictionless Supports Y *********
CMBLOCK,_FRICSUY,NODE,       28
(8i10)
       360       361       362       365       366       367       561       562
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cmsel,s,_FRICSUY
d,all,uy,0
nsel,all
nsel,all
/com,*********** Node Rotations ***********
nmod,359,,,,-34.2876726314758,0.,0.
nmod,360,,,,29.9697097620591,0.,0.
nmod,361,,,,2.33474703155693,0.,0.
nmod,362,,,,-25.9383357227485,0.,0.
nmod,363,,,,36.847788408548,0.,0.
nmod,364,,,,-34.6130609884178,0.,0.
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nmod,1421,,,,-4.74773409419986,0.,0.
/com,*********** Define Force Using Surface Effect Elements ***********
local,12,0,0.,0.,0.,-0.,0.,0.
csys,0
et,2,153
keyop,2,3,10   !get plane stress option and thickness from underlying element
eblock,10,,,12
(15i9)
      468        2        2        2       12      414      413     1470
      469        2        2        2       12      409      408     1465
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-1
esel,s,type,,2
keyop,2,2,1                ! Apply load in local coordinate system
keyop,2,7,1                ! Use original area so load is constant in large deformation
keyop,2,11,2               ! Use real and not project area
esel,all

*DIM,_loadvari30x,TABLE,2,1,1,TIME,
! Time values
_loadvari30x(1,0,1) = 0.
_loadvari30x(2,0,1) = 1.
! Load values
_loadvari30x(1,1,1) = 0.
_loadvari30x(2,1,1) = -102130.086326758


*DIM,_loadvari30y,TABLE,2,1,1,TIME,
! Time values
_loadvari30y(1,0,1) = 0.
_loadvari30y(2,0,1) = 1.
! Load values
_loadvari30y(1,1,1) = 0.
_loadvari30y(2,1,1) = 34043.3621089193

/com,*********** Define Force Using Surface Effect Elements ***********
local,13,0,0.,0.,0.,-0.,0.,0.
csys,0
et,3,153
keyop,3,3,10   !get plane stress option and thickness from underlying element
eblock,10,,,14
(15i9)
      480        3        3        3       13      369      565     1396
      481        3        3        3       13      572      369     1397
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-1
eblock,10,,,14
(15i9)
      494        3        3        3       13      370      572     1394
      495        3        3        3       13      566      370     1395
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-1
esel,s,type,,3
keyop,3,2,1                ! Apply load in local coordinate system
keyop,3,7,1                ! Use original area so load is constant in large deformation
keyop,3,11,2               ! Use real and not project area
esel,all

*DIM,_loadvari35x,TABLE,2,1,1,TIME,
! Time values
_loadvari35x(1,0,1) = 0.
_loadvari35x(2,0,1) = 1.
! Load values
_loadvari35x(1,1,1) = 0.
_loadvari35x(2,1,1) = -66507.6508501068


*DIM,_loadvari35y,TABLE,2,1,1,TIME,
! Time values
_loadvari35y(1,0,1) = 0.
_loadvari35y(2,0,1) = 1.
! Load values
_loadvari35y(1,1,1) = 0.
_loadvari35y(2,1,1) = 287739.332164557

/com,*********** Define Force Using Surface Effect Elements ***********
local,14,0,0.,0.,0.,-0.,0.,0.
csys,0
et,4,153
keyop,4,3,10   !get plane stress option and thickness from underlying element
eblock,10,,,7
(15i9)
      508        4        4        4       14      541      540     1595
      509        4        4        4       14      542      541     1596
      510        4        4        4       14      540      539     1594
      511        4        4        4       14      539      538     1593
      512        4        4        4       14      543      542     1597
      513        4        4        4       14      545      543     1601
      514        4        4        4       14      538      544     1599
-1
eblock,10,,,7
(15i9)
      515        4        4        4       14      535      534     1590
      516        4        4        4       14      536      535     1591
      517        4        4        4       14      534      533     1589
      518        4        4        4       14      537      536     1592
      519        4        4        4       14      533      532     1588
      520        4        4        4       14      532      545     1600
      521        4        4        4       14      544      537     1598
-1
esel,s,type,,4
keyop,4,2,1                ! Apply load in local coordinate system
keyop,4,7,1                ! Use original area so load is constant in large deformation
keyop,4,11,2               ! Use real and not project area
esel,all

*DIM,_loadvari37x,TABLE,2,1,1,TIME,
! Time values
_loadvari37x(1,0,1) = 0.
_loadvari37x(2,0,1) = 1.
! Load values
_loadvari37x(1,1,1) = 0.
_loadvari37x(2,1,1) = 0.


*DIM,_loadvari37y,TABLE,2,1,1,TIME,
! Time values
_loadvari37y(1,0,1) = 0.
_loadvari37y(2,0,1) = 1.
! Load values
_loadvari37y(1,1,1) = 0.
_loadvari37y(2,1,1) = -1618319.17995914

fini
/com,****************************************************************************
/com,*************************    SOLUTION       ********************************
/com,****************************************************************************
/solu
antype,0                   ! static analysis
solc,on,on                 ! Turn on solution control with ability to use contact time prediction
eqsl,sparse,,,,,1
cntr,print,1               ! print out contact info and also make no initial contact an error
nldiag,cont,iter           ! print out contact info each equilibrium iteration
resc,,none                 ! Do not keep any restart files
/com,****************************************************
/com,******************* SOLVE FOR LS 1 ****************
esel,s,type,,2
nsle
sfe,all,1,pres,1,%_loadvari30x%
sfe,all,2,pres,1,%_loadvari30y%
esel,s,type,,3
nsle
sfe,all,1,pres,1,%_loadvari35x%
sfe,all,2,pres,1,%_loadvari35y%
esel,s,type,,4
nsle
sfe,all,1,pres,1,%_loadvari37x%
sfe,all,2,pres,1,%_loadvari37y%
nsel,all
esel,all
nsub,1,1,1
time,1.
outres,erase
outres,all,none
outres,nsol,all
outres,rsol,all
outres,strs,all
outres,epel,all
outres,eppl,all
stabilize,off                   ! Stabilization turned OFF by user
! *********** WB SOLVE COMMAND ***********
! check interactive state
*get,ANSINTER_,active,,int
*if,ANSINTER_,ne,0,then
/eof
*endif
solve
/com *************** Write FE CONNECTORS *********
CEWRITE,file,ce,,INTE
/com,****************************************************
/com,*************** FINISHED SOLVE FOR LS 1 *************
*set,_DS_PROGRESS          ! turn off progress updates to avoid virus scanning bug
/post1
fini
