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/batch
! ANSYS input file written by Workbench version 15.0.7  Release
! File used for geometry attach: D:\MyDocs\Documents\GitHub\AgileRoboticControls\Software\Ansys Model_files\dp0\Geom-1\DM\Geom-1.agdb
/title,Ansys Model--Static Structural (A5)
/com,--- Data in consistent NMM units.
/units,MPA
/prep7
! Turn off shape checking because checks already performed inside WB mesher.
! See help system for more information.
SHPP,OFF,,NOWARN
etcon,set             ! allow ANSYS to choose best KEYOP's for 180x elements
/com,*********** Nodes for the whole assembly ***********
nblock,3
(1i9,3e20.9e3)
        1    6.813779019E+000    6.444715658E+001    4.971037165E+000
        2    1.005957918E+001    6.848897105E+001    5.863968773E+000
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-1
/com,*********** Elements for Body 1 "Solid" ***********
et,1,187
eblock,19,solid,,2948
(19i9)
        1        1        1        1        0        0        0        0       10        0        1      590       67       53      342     2414     2411     2412      838
     3684     3846
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-1
/com,*********** Send User Defined Coordinate System(s) ***********
csys,0
toffst,273.15,  ! Temperature offset from absolute zero
/com,*********** Set Reference Temperature ***********
tref,22.
/com,*********** Send Materials ***********
MP,EX,1,68947.6,	! tonne s^-2 mm^-1
MP,NUXY,1,0.33,
MP,DENS,1,2.7e-09,	! tonne mm^-3

!************************* Model Summary ********************
!Solid,	6065-T5 Aluminum,	matid,	1
!************************* End Model Summary ********************
/com,*********** Fixed Supports ***********
CMBLOCK,_FIXEDSU,NODE,      241
(8i10)
        26        30        33        34        35        36       135       136
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cmsel,s,_FIXEDSU
d,all,all
nsel,all
nsel,all
/com,*********** Define Force Using Surface Effect Elements ***********
local,12,0,0.,0.,0.,-0.,0.,0.
csys,0
et,2,154
eblock,10,,,10
(15i9)
     2949        2        2        2       12      689      687      686      686     4793     4788      686     4792
     2950        2        2        2       12      692      689      686      686     4803     4792      686     4802
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-1
esel,s,type,,2
keyop,2,2,1                ! Apply load in local coordinate system
keyop,2,7,1                ! Use original area so load is constant in large deformation
keyop,2,11,2               ! Use real and not project area
esel,all

*DIM,_loadvari29x,TABLE,2,1,1,TIME,
! Time values
_loadvari29x(1,0,1) = 0.
_loadvari29x(2,0,1) = 1.
! Load values
_loadvari29x(1,1,1) = 0.
_loadvari29x(2,1,1) = 1.35712393533513


*DIM,_loadvari29y,TABLE,2,1,1,TIME,
! Time values
_loadvari29y(1,0,1) = 0.
_loadvari29y(2,0,1) = 1.
! Load values
_loadvari29y(1,1,1) = 0.
_loadvari29y(2,1,1) = 1.27909773886511e-002


*DIM,_loadvari29z,TABLE,2,1,1,TIME,
! Time values
_loadvari29z(1,0,1) = 0.
_loadvari29z(2,0,1) = 1.
! Load values
_loadvari29z(1,1,1) = 0.
_loadvari29z(2,1,1) = 0.

/com,*********** Define Force Using Surface Effect Elements ***********
local,13,0,0.,0.,0.,-0.,0.,0.
csys,0
et,3,154
eblock,10,,,10
(15i9)
     2959        3        3        3       13      744      743      737      737     4917     4914      737     4916
     2960        3        3        3       13      745      740      743      743     4918     4915      743     4919
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-1
esel,s,type,,3
keyop,3,2,1                ! Apply load in local coordinate system
keyop,3,7,1                ! Use original area so load is constant in large deformation
keyop,3,11,2               ! Use real and not project area
esel,all

*DIM,_loadvari31x,TABLE,2,1,1,TIME,
! Time values
_loadvari31x(1,0,1) = 0.
_loadvari31x(2,0,1) = 1.
! Load values
_loadvari31x(1,1,1) = 0.
_loadvari31x(2,1,1) = 0.143662672264623


*DIM,_loadvari31y,TABLE,2,1,1,TIME,
! Time values
_loadvari31y(1,0,1) = 0.
_loadvari31y(2,0,1) = 1.
! Load values
_loadvari31y(1,1,1) = 0.
_loadvari31y(2,1,1) = 0.120547300943232


*DIM,_loadvari31z,TABLE,2,1,1,TIME,
! Time values
_loadvari31z(1,0,1) = 0.
_loadvari31z(2,0,1) = 1.
! Load values
_loadvari31z(1,1,1) = 0.
_loadvari31z(2,1,1) = 0.

/com,*********** Define Force Using Surface Effect Elements ***********
local,14,0,0.,0.,0.,-0.,0.,0.
csys,0
et,4,154
eblock,10,,,37
(15i9)
     2969        4        4        4       14      141      145      648      648     2699     2698      648     2695
     2970        4        4        4       14      602      143      141      141     2690     2703      141     2702
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-1
esel,s,type,,4
keyop,4,2,1                ! Apply load in local coordinate system
keyop,4,7,1                ! Use original area so load is constant in large deformation
keyop,4,11,2               ! Use real and not project area
esel,all

*DIM,_loadvari50x,TABLE,2,1,1,TIME,
! Time values
_loadvari50x(1,0,1) = 0.
_loadvari50x(2,0,1) = 1.
! Load values
_loadvari50x(1,1,1) = 0.
_loadvari50x(2,1,1) = 0.


*DIM,_loadvari50y,TABLE,2,1,1,TIME,
! Time values
_loadvari50y(1,0,1) = 0.
_loadvari50y(2,0,1) = 1.
! Load values
_loadvari50y(1,1,1) = 0.
_loadvari50y(2,1,1) = 7.10559900172392e-002


*DIM,_loadvari50z,TABLE,2,1,1,TIME,
! Time values
_loadvari50z(1,0,1) = 0.
_loadvari50z(2,0,1) = 1.
! Load values
_loadvari50z(1,1,1) = 0.
_loadvari50z(2,1,1) = 0.

/com,*********** Define Force Using Surface Effect Elements ***********
local,15,0,0.,0.,0.,-0.,0.,0.
csys,0
et,5,154
eblock,10,,,8
(15i9)
     3006        5        5        5       15      769      766      768      768     4980     4978      768     4981
     3007        5        5        5       15      768      770      772      772     4986     4995      772     4994
     3008        5        5        5       15      771      770      766      766     4992     4985      766     4990
     3009        5        5        5       15      770      768      766      766     4986     4978      766     4985
     3010        5        5        5       15      788      787      767      767     5035     5030      767     5033
     3011        5        5        5       15      803      771      787      787     5090     5031      787     5091
     3012        5        5        5       15      766      767      771      771     4974     4991      771     4990
     3013        5        5        5       15      787      771      767      767     5031     4991      767     5030
-1
esel,s,type,,5
keyop,5,2,1                ! Apply load in local coordinate system
keyop,5,7,1                ! Use original area so load is constant in large deformation
keyop,5,11,2               ! Use real and not project area
esel,all

*DIM,_loadvari52x,TABLE,2,1,1,TIME,
! Time values
_loadvari52x(1,0,1) = 0.
_loadvari52x(2,0,1) = 1.
! Load values
_loadvari52x(1,1,1) = 0.
_loadvari52x(2,1,1) = 0.


*DIM,_loadvari52y,TABLE,2,1,1,TIME,
! Time values
_loadvari52y(1,0,1) = 0.
_loadvari52y(2,0,1) = 1.
! Load values
_loadvari52y(1,1,1) = 0.
_loadvari52y(2,1,1) = -2.79000558708993e-002


*DIM,_loadvari52z,TABLE,2,1,1,TIME,
! Time values
_loadvari52z(1,0,1) = 0.
_loadvari52z(2,0,1) = 1.
! Load values
_loadvari52z(1,1,1) = 0.
_loadvari52z(2,1,1) = 0.

fini
/com,****************************************************************************
/com,*************************    SOLUTION       ********************************
/com,****************************************************************************
/solu
antype,0                   ! static analysis
solc,on,on                 ! Turn on solution control with ability to use contact time prediction
eqsl,pcg,1e-8,,,,,,1
cntr,print,1               ! print out contact info and also make no initial contact an error
nldiag,cont,iter           ! print out contact info each equilibrium iteration
resc,,none                 ! Do not keep any restart files
/com,****************************************************
/com,******************* SOLVE FOR LS 1 ****************
esel,s,type,,2
nsle
sfe,all,1,pres,1,%_loadvari29x%
sfe,all,2,pres,1,%_loadvari29y%
sfe,all,3,pres,1,%_loadvari29z%
esel,s,type,,3
nsle
sfe,all,1,pres,1,%_loadvari31x%
sfe,all,2,pres,1,%_loadvari31y%
sfe,all,3,pres,1,%_loadvari31z%
esel,s,type,,4
nsle
sfe,all,1,pres,1,%_loadvari50x%
sfe,all,2,pres,1,%_loadvari50y%
sfe,all,3,pres,1,%_loadvari50z%
esel,s,type,,5
nsle
sfe,all,1,pres,1,%_loadvari52x%
sfe,all,2,pres,1,%_loadvari52y%
sfe,all,3,pres,1,%_loadvari52z%
nsel,all
esel,all
nsub,1,1,1
time,1.
outres,erase
outres,all,none
outres,nsol,all
outres,rsol,all
outres,strs,all
outres,epel,all
outres,eppl,all
stabilize,off                   ! Stabilization turned OFF by user
! *********** WB SOLVE COMMAND ***********
! check interactive state
*get,ANSINTER_,active,,int
*if,ANSINTER_,ne,0,then
/eof
*endif
solve
/com *************** Write FE CONNECTORS *********
CEWRITE,file,ce,,INTE
/com,****************************************************
/com,*************** FINISHED SOLVE FOR LS 1 *************
*set,_DS_PROGRESS          ! turn off progress updates to avoid virus scanning bug
*get,_PCGITER,active,,solu,cgiter
/post1
fini
